ΔI := (10^-5)  # - шаг графика
I := 0, ΔI .. 10^-3
N := 1
Ft := 0.0255
Is := 10^-12
Rs := 2
# - модельная характеристика
# с параметрами модели, полученными в процессе расчета по исходным данным MC7
U(I) := I*Rs + ln((I + Is)/Is)*N*Ft
# График, по данным  и расчетом MathCad
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# .MODEL D102 D (IS=3.525P RS=1.32 IKF=.1402 N=1 XTI=3 EG=1.11 CJO=32.42P
# +  M=.2894 VJ=.75 FC=.5 ISR=24.36U NR=2 BV=199.8 IBV=344.9N
# +  TT=2.164U)
Rs = 2
Is = 1e-12
N = 1
Ft = 0.0255
