# Многие уравнения и системы не имеют аналитических решений. Численные решения
# с заданной точностью (не более значения, заданного системной переменной TOL).
# При решении системы нелинейных уравнений используют специальный вычислитель
# ный блок, открываемый служебным словом - директивой  Given и имеющий следую
# щую структуру:
# начальные приближения неизвестных пременных
# Given
# Уравнения (знак присвоения между левой и правой частью Ctrl = )
# Ограничительные условия
# Выражения с функциями Find и Minerr
#
# Проверка решения.
# Find(v1,v2....vn) - возвращает значение одной или ряда переменных для точного решения;
# Minerr(v1,v2...vn) - возвращает значение одной или ряда переменных для приближенного решения.
# Find используется, когда решение реально существует. Minerr функция пытается найти максимальное приближение  даже к несуществующему решению путем минимизации среднеквадратической погрешности решения.
# левая часть уравнение вида F(x)=0 для модели полупроводникового диода запишется как:
IS*(exp((Ud - Id*Rb)/(m*Ft)) - 1) - Id
# Решение  F(x)=0 для переменной
# Ud.
# Id*Rb + ln((IS + Id)/IS)*m*Ft=Ud,
# которое получено Символика- Переменная- Решение:
Id*Rb + ln((IS + Id)/IS)*m*Ft
# Построение графика функции:
Ft := 0.0255
IS := 10^-10
Rb := 1
m := 2
Id := 0, 10^-5 .. 10^-3
Ud(Id) := Id*Rb + ln((IS + Id)/IS)*m*Ft
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# Вычисление ВАХ при заданных параметрах | Заданные параметры модели
x := 10^-0
F(x) := x*Rb + ln((IS + x)/IS)*m*Ft
Rb = 1
IS = 1e-10
m = 2
F(x) = 2.17432
Ft = 0.0255
Given
0.823 == 10^-3*Rb + ln((IS + 10^-3)/IS)*m*Ft
0.949 == 10^-2*Rb + ln((IS + 10^-2)/IS)*m*Ft
1.157 == 10^-1*Rb + ln((IS + 10^-1)/IS)*m*Ft
2.174 == 10^-0*Rb + ln((IS + 10^-0)/IS)*m*Ft
Diod_P := Minerr(IS, Rb, m, Ft)
Diod_P = [1.01302e-10; 0.999676; 1.9716; 0.0258824]
Diod_P[0] = 1.01302e-10
Diod_P[1] = 0.999676
Diod_P[2] = 1.9716
Diod_P[3] = 0.0258824
# Проверка решения:
Id := 10^-3
F(Id) := Id*Diod_P[1] + ln((Diod_P[0] + Id)/Diod_P[0])*Diod_P[2]*Diod_P[3]
F(Id) = 0.82284
