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# Данные из решения MC
i := 0 .. 5
Fmax[i] := 401560, 460612, 471594, 477175, 480596, 482937
Vvar[i] := 0, -5, -10, -15, -20, -25
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# Аналитическое решение относительно Cd
Fr == 1/(2*pi*sqrt((Ck + Cd)*Lk))
-(Ck*Lk - 1/(4*Fr^2*pi^2))/Lk
# ПОСТРОЕНИЕ ВОЛЬТФАРАДНОЙ ХАРАКТЕРИСТИКИ
Lk := 10^-3
Ck := 10^-10
pi := 3.14
Fr[i] := Fmax[i]
Cd := -(Ck*Lk - 1/(4*Fr^2*pi^2))/Lk
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Fmax[i] := 401560, 460612, 471594, 477175, 480596, 482937
Vvar[i] := 0, -5, -10, -15, -20, -25
Cd = [5.72461e-11; 1.95116e-11; 1.40103e-11; 1.1359e-11; 9.77929e-12; 8.71757e-12]
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Cbo := 10^-12
φ := 0.6
M := 0.5
# Уравнение модели диода:
Cd(Ud) := Cbo*(φ/(φ - Ud))^M
# Решение методом Given Minerr  для заранее определенной ВФХ
Cbo1 := 10^-12
φ1 := 0.6
M1 := 0.33  # - начальные условия для решения
Given
9.77928777035e-12 == Cbo1*(φ1/(φ1 + 20))^M1
1.13590066251e-11 == Cbo1*(φ/(φ1 + 15))^M1
1.95116428034e-11 == Cbo1*(φ1/(φ1 + 15))^M1
# полученное решение для модели
Minerr(Cbo1, φ1, M1) = [4.0678e-8; 0.744662; 2.50463]
# Решение методом Given Minerr  для заранее определенной ВФХ
# Формирование вектора напряжений, индексная величина
k := 0 .. 10
ΔV := 1
VD[k] := -10 + k*ΔV
Cbo1 := 10^-12
φ1 := 0.6
M1 := 0.33  # - начальные условия для решения
Cd(Ud) := Cbo*(φ/(φ - Ud))^M
Given
Cd(VD[2]) == Cbo1*(φ1/(φ1 - VD[2]))^M1
Cd(VD[4]) == Cbo1*(φ/(φ1 - VD[4]))^M1
Cd(VD[8]) == Cbo1*(φ1/(φ1 - VD[8]))^M1
Minerr(Cbo1, φ1, M1) = [1e-12; 0.6; 0.5]  # полученное решение для модели
