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# Данные из решения MC
i := 0 .. 5
Fmax[i] := 401560, 460612, 471594, 477175, 480596, 482937
Vvar[i] := 0, -5, -10, -15, -20, -25
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# Аналитическое решение относительно Cd
Fr == 1/(2*pi*sqrt((Ck + Cd)*Lk))
-(Ck*Lk - 1/(4*Fr^2*pi^2))/Lk
# ПОСТРОЕНИЕ ВОЛЬТФАРАДНОЙ ХАРАКТЕРИСТИКИ
Lk := 10^-3
Ck := 10^-10
pi := 3.14
Fr[i] := Fmax[i]
Cd := -(Ck*Lk - 1/(4*Fr^2*pi^2))/Lk
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Fmax[i] := 401560, 460612, 471594, 477175, 480596, 482937
Vvar[i] := 0, -5, -10, -15, -20, -25
Cd = [5.72461e-11; 1.95116e-11; 1.40103e-11; 1.1359e-11; 9.77929e-12; 8.71757e-12]
