VAX := READPRN("ВАХ ДИОДА ПРЯМАЯ ВЕТВЬ.DNO")
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VAX = [
    0.4, 1.6e-6;
    0.407, 2.1e-6;
    0.414, 2.8e-6;
    0.421, 3.6e-6;
    0.428, 4.7e-6;
    0.435, 6.2e-6;
    0.442, 8.1e-6;
    0.449, 1.05e-5;
    0.456, 1.39e-5;
    0.463, 1.83e-5
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]
length(VAX[:, 1]) = 51
Id3 := max(VAX[:, 1])
Id3 = 0.0707108
nMax := match(Id3, VAX[:, 1])
nMax = [50]
Ud3 := VAX[:, 0][50]
Ud3 = 0.75
# match(z, A)
nId1 := match(Id3/4, VAX[:, 1])
nId1 = [37]
# match(z, A)
nId2 := match(Id3/2, VAX[:, 1])
nId2 = [42]
Id3/4 = 0.0176777  # ??????????? ???????? ???? Id1
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Id1 := 0.00570438
Ud1 := 0.69735
Ud1 := linterp(VAX[:, 1], VAX[:, 0], Id3/4)
Ud1 = 0.659399
Id1 := Id3/4
Ud2 := linterp(VAX[:, 1], VAX[:, 0], Id3/2)
Ud2 = 0.695535
Id2 := Id3/2
Rb := (Ud1 - 2*Ud2 + Ud3)/Id1
Rb = 1.03682
NFt := ((3*Ud2 - 2*Ud1) - Ud3)/ln(2)
NFt = 0.025691
Is0 := Id1*exp(-1/NFt*(2*Ud1 - Ud3))
Is0 = 4.28714e-12
# .MODEL 1N457 D (BV=70 CJO=4.505242P IBV=100.000001P
# +  IS=29.059853P M=385.098778M
# +  N=1.425365 RL=125.018164MEG
# +  RS=910.682867M TT=5U VJ=700M)
Rb = 1.03682
Is0 = 4.28714e-12
U(I) := I*Rb + ln((I + Is0)/Is0)*NFt
Rb := 1.76
NFt := 0.0255*1.109
U(I) := I*Rb + ln((I + Is0)/Is0)*NFt
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U(VAX[:, 1]) = [
    0.362826; 0.370517; 0.378654; 0.385762; 0.393304; 0.40114; 0.408703; 0.416046; 0.423985; 0.431769
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]
VAX[:, 0] = [
    0.4; 0.407; 0.414; 0.421; 0.428; 0.435; 0.442; 0.449; 0.456; 0.463
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]
Is0 := 1.572*10^-8
Rb := 0.414
NFt := (0.0255*1.42)
Ltab := length(VAX[:, 0])
min(VAX[:, 1]) = 1.6e-6
max(VAX[:, 1]) = 0.0707108
ΔI := ((max(VAX[:, 1]) - min(VAX[:, 1]))/Ltab)
ΔI = 0.00138645
I := min(VAX[:, 1]), min(VAX[:, 1]) + ΔI .. max(VAX[:, 1])
