# Запись уравнения для модели диода Ud
Id - Io*(exp((Ud - Id*Rb)/NFt) - 1)
# имеет решение(я)
NFt*ln((Id + Io)/Io) + Id*Rb
# ПОСТРОЕНИЕ ГРАФИКА ВАХ ДИОДА ПО ФОРМУЛЕ:
Rb := 1
NFt := 0.0255
Is0 := 10^-14
Idiod := 0, 10^-5 .. 0.023
Udiod(Idiod) := Idiod*Rb + NFt*ln((Idiod + Is0)/Is0)
Idiod =  # no stored result
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# ОПРЕДЕЛЕНИЕ ПАРАМЕТРОВ УРАВНЕНИЯ МОДЕЛИ. МЕТОД ТРЕХ ТОЧЕК
Id3 := 0.023
Ud3 := Udiod(Id3)
Ud3 = 0.74883
Id1 := Id3/4
Id1 = 0.00575
Id2 := Id3/2
Id2 = 0.0115
Ud1 := Udiod(Id1)
Ud1 = 0.69623
Ud2 := Udiod(Id2)
Ud2 = 0.719655
Rbcalc := (Ud1 - 2*Ud2 + Ud3)/Id1
Rb = 1
Rbcalc = 1
NFtcalc := ((3*Ud2 - 2*Ud1) - Ud3)/ln(2)
NFt = 0.0255
NFtcalc = 0.0255
Is0calc := Id1*exp(-1/NFt*(2*Ud1 - Ud3))
Is0 = 1e-14
Is0calc = 6.2794e-14
Is0calc := 10^-14
# ПОСТРОЕНИЕ ГРАФИКА ВАХ МОДЕЛИ И ИСХОДНЫХ ДАННЫХ:
# Ранжированная переменная Idiod
Idiod := 0, 10^-5 .. 0.023
U1(Idiod) := Idiod*Rb + NFt*ln((Idiod + Is0)/Is0)
U2(Idiod) := Idiod*Rbcalc + NFtcalc*ln((Idiod + Is0calc)/Is0calc)
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Idiod =  # no stored result
# АРГУМЕНТ ФУНКЦИИ
# РАСЧЕТА ВАХ ДИОДА
U1(Idiod) =  # no stored result
U2(Idiod) =  # no stored result
Ud1 = 0.69623
Id1 = 0.00575
Ud2 = 0.719655
Id2 = 0.0115
Ud3 = 0.74883
Id3 = 0.023
Rb = 1
NFt = 0.0255
Is0 = 1e-14
# ОПРЕДЕЛЕНИЕ ПАРАМЕТРОВ УРАВНЕНИЯ МОДЕЛИ. МЕТОД given minerr
# ПОСТРОЕНИЕ ГРАФИКА ВАХ ДИОДА ПО ФОРМУЛЕ:
Rb := 1
NFt := 0.0255
IS := 10^-14
Idiod := 0, 10^-5 .. 0.023
Udiod(Idiod) := Idiod*Rb + NFt*ln((Idiod + Is0)/Is0)
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Given
0.52845 == 1e-5*Rb + ln((IS + 1e-5)/IS)*NFt
0.68493 == 0.00396*Rb + ln((IS + 0.00396)/IS)*NFt
0.6146 == 0.00029 - 1*Rb + ln((IS + 0.00029)/IS)*NFt
Diod_P := Minerr(IS, Rb, NFt)
Diod_P = [1.68581e-14; 0.00222698; 0.0261596]
