# Расчет параметров модели диода:
Cd == Cbo*(φ/(φ - Ud))^M
# Начальные условия для проведения расчетов вольт-фарадной характеристики
Cbo := 10^-11
φ := 0.8
M := 0.5
Ud := -10, -9.9 .. 0
# Уравнение модели диода:
Cd(Ud) := Cbo*(φ/(φ - Ud))^M
# Формирование вектора напряжений, индексная величина
k := 0 .. 10
ΔV := 1
VD[k] := -10 + k*ΔV
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# Построения графика для вольт-фарадной характеристики
Cd(VD) = [2.72166e-12; 2.85714e-12; 3.01511e-12; 3.20256e-12; 3.42997e-12; 3.71391e-12; 4.08248e-12; 4.58831e-12; 5.34522e-12; 6.66667e-12; 1e-11]
VD = [-10; -9; -8; -7; -6; -5; -4; -3; -2; -1; 0]
Cd(0) = 1e-11
# Решение методом Given Minerr  для заранее определенной ВФХ
Cbo1 := 10^-12
φ1 := 0.6
M1 := 0.33  # - начальные условия для решения
Given
Cd(VD[2]) == Cbo1*(φ1/(φ1 - VD[2]))^M1
Cd(VD[4]) == Cbo1*(φ/(φ1 - VD[4]))^M1
Cd(VD[8]) == Cbo1*(φ1/(φ1 - VD[8]))^M1
Minerr(Cbo1, φ1, M1) = [1e-11; 0.8; 0.5]  # полученное решение для модели
