# ОПРЕДЕЛЕНИЕ ПАРАМЕТРОВ МОДЕЛИ ДИОДА.
# Для решения систем уравнений используется специальный вычислительный блок
# который открывается директивой Given.  Искомые переменные находятся в соответствии
# с уравнениями и неравенствами директивой find, искомые переменные должны быть представлены в виде вектора столбца.
# Так для случая расчета параметров модели диода
# .model D102  D(Is=3.525p Rs=1.32 Ikf=.1402 N=1 Xti=3 Eg=1.11 Cjo=32.42p
# +  M=.2894 Vj=.75 Fc=.5 Isr=24.36u Nr=2 Bv=199.8 Ibv=344.9n
# +  Tt=2.164u)
# экспериментальные данные ВАХ диода (полученные при моделировании  в MC) :
MC := READPRN("c:\MC9\DATA\RL1RL6\MCD\DIOD_F.dat")
Ud := MC[:, 0]
Id := MC[:, 1]
Nmax := last(MC[:, 0])  # число точек эксперимента
Nmax = 50
Ud = [
    0; 0.02; 0.04; 0.06; 0.08; 0.1; 0.12; 0.14; 0.16; 0.18
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]
Id = [
    0; 1.14e-5; 2.8e-5; 5.2e-5; 8.7e-5; 0.0001377; 0.0002115; 0.0003183; 0.0004729; 0.000696
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]  # Переназначение переменных
Id3 := max(Id)
Id3 = 0.367854
# Максимальный ток
nId3 := match(Id3, Id)[0]  # Номер элемента в векторе
# match(z, A)
# Ищет в векторе или матрице A заданное значение z и возвращает индексы его позиций в A.
Ud3 := Ud[nId3]
Ud3 = 1
# Напряжение для  тока Id3
nId3 = 50
# lookup(z, A, B)
# Ищет в векторе или матрице A заданное значение z и возвращает это значение (значения) в той же позиции (позициях) (с теми же номерами строк и столбцов) в другой матрице B. Если возвращаются несколько значений, они представляются в виде вектора.
lookup(Id3, Id, Ud)[0] = 1  # Напряжение для  тока Id3
# половинный ток ВАХ
lookup(Id3/2, Id, Ud)[0] = 0.72
nId2 := match(Id3/2, Id)[0]
nId2 = 36
Ud2 := lookup(Id3/2, Id, Ud)[0]
Ud2 = 0.72
Id2 := Id3/2
Id2 = 0.183927
Ud = [
    0; 0.02; 0.04; 0.06; 0.08; 0.1; 0.12; 0.14; 0.16; 0.18
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]
Id = [
    0; 1.14e-5; 2.8e-5; 5.2e-5; 8.7e-5; 0.0001377; 0.0002115; 0.0003183; 0.0004729; 0.000696
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]
# ток одной четверти ВАХ
lookup(Id3/4, Id, Ud)[0] = 0.56
nId1 := match(Id3/4, Id)[0]
nId1 = 28
Ud1 := lookup(Id3/4, Id, Ud)[0]
Ud1 = 0.56
Id1 := Id3/4
Id1 = 0.0919636
Ud = [
    0; 0.02; 0.04; 0.06; 0.08; 0.1; 0.12; 0.14; 0.16; 0.18
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]
Id = [
    0; 1.14e-5; 2.8e-5; 5.2e-5; 8.7e-5; 0.0001377; 0.0002115; 0.0003183; 0.0004729; 0.000696
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]
# Вычисление параметров модели диода
Rb := (Ud1 - 2*Ud2 + Ud3)/Id1
Rb = 1.30486
NFt := ((3*Ud2 - 2*Ud1) - Ud3)/ln(2)
NFt = 0.0577078
Is0 := Id1*exp(-1/NFt*(2*Ud1 - Ud3))
Is0 = 0.0114954
# .model D102  D(Is=3.525p Rs=1.32 Ikf=.1402 N=1 Xti=3 Eg=1.11 Cjo=32.42p
# +  M=.2894 Vj=.75 Fc=.5 Isr=24.36u Nr=2 Bv=199.8 Ibv=344.9n
# +  Tt=2.164u)
# - модельная характеристика с параметрами модели, полученными в процессе расчета по исходным данным MC
U(Id) := Id*Rb + ln((Id + Is0)/Is0)*NFt
# Совместный график, по данным MC и расчетом в MathCad
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Id3 := max(Id)
Id3 = 0.367854
Ud3 := max(Ud)
Ud3 = 1
Ud1 := linterp(Id, Ud, Id3/4)
Ud1 = 0.560358
Id1 := Id3/4
Ud2 := linterp(Id, Ud, Id3/2)
Ud2 = 0.719281
Id2 := Id3/2
Rb := (Ud1 - 2*Ud2 + Ud3)/Id1
Rb = 1.32438
NFt := ((3*Ud2 - 2*Ud1) - Ud3)/ln(2)
NFt = 0.0535657
Is0 := Id1*exp(-1/NFt*(2*Ud1 - Ud3))
Is0 = 0.00965815
# - модельная характеристика с параметрами модели, полученными в процессе расчета по исходным данным MC
U(I) := I*Rb + ln((I + Is0)/Is0)*NFt
# Совместный график, по данным MC и расчетом в MathCad
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# Данные модели из MC, массив данных
# .model D102  D(Is=3.525p Rs=1.32 Ikf=.1402 N=1 Xti=3 Eg=1.11 Cjo=32.42p
# +  M=.2894 Vj=.75 Fc=.5 Isr=24.36u Nr=2 Bv=199.8 Ibv=344.9n
# +  Tt=2.164u)
