# ОПРЕДЕЛЕНИЕ ПАРАМЕТРОВ МОДЕЛИ ДИОДА.
# Для решения систем уравнений используется специальный вычислительный блок
# который открывается директивой Given.  Искомые переменные находятся в соответствии
# с уравнениями и неравенствами директивой find, искомые переменные должны быть представлены в виде вектора столбца.
# Так для случая расчета параметров модели диода
# .model D102  D(Is=3.525p Rs=1.32 Ikf=.1402 N=1 Xti=3 Eg=1.11 Cjo=32.42p
# +  M=.2894 Vj=.75 Fc=.5 Isr=24.36u Nr=2 Bv=199.8 Ibv=344.9n
# +  Tt=2.164u)
# экспериментальные данные ВАХ диода (полученные при моделировании  в MC) :
MC := READPRN("DIOD_VAX01_myDiod.DNO")
Ud := MC[:, 0]
Id := MC[:, 1]
Ud = [
    0; 0.01; 0.02; 0.03; 0.04; 0.05; 0.06; 0.07; 0.08; 0.09
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]
Id = [
    0; 5.2e-6; 1.14e-5; 1.89e-5; 2.8e-5; 3.89e-5; 5.2e-5; 6.79e-5; 8.7e-5; 0.00011
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]
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Id == Is*(exp((Ud - Rs*Id)/(N*Ft)) - 1)
# решение Ud
Id*Rs + Ft*N*ln((Id + Is)/Is)
# .model D102  D(Is=3.525p Rs=1.32 Ikf=.1402 N=1 Xti=3 Eg=1.11 Cjo=32.42p
# +  M=.2894 Vj=.75 Fc=.5 Isr=24.36u Nr=2 Bv=199.8 Ibv=344.9n
# +  Tt=2.164u)
# ---------------------------------------------------------------------------------------------------------------------------------------------------
k := 5
Idmodel := Id[k]
Id[k] = 3.89e-5
Ud[k] = 0.05
# -------------------------------------------------------------------------------------------------------------------------------------------------
Ft := 0.0255
Is := 3.525*10^-12
Rs := 1.32
N := 1.0
Idmodel = 3.89e-5
Udmodel := Idmodel*Rs + Ft*N*ln((Idmodel + Is)/Is)
Ud[k] = 0.05
Udmodel = 0.413575
# Начальные приближения  численных методов решения системы нелинейных уравнений для искомых переменных можно взять из данных модели:
Fto := 0.05
Iso := 3.525*10^-10
Rso := 5
No := 1.0
U1 := Ud[5]
U2 := Ud[10]
U3 := Ud[15]
U4 := Ud[20]
I1 := Id[5]
I2 := Id[10]
I3 := Id[15]
I4 := Id[20]
Given
U1 == I1*Rso + ln((Iso + I1)/Iso)*No*Fto
U2 == I2*Rso + ln((Iso + I2)/Iso)*No*Fto
U3 == I3*Rso + ln((Iso + I3)/Iso)*No*Fto
U4 == I4*Rso + ln((Iso + I4)/Iso)*No*Fto
No > 1
Fto > 0.0255
No ≤ 2
Fto ≤ 0.03
Diod_P := Minerr(Iso, Rso, No, Fto)
Diod_P = [2.50947e-5; 1.0834; 1.77951; 0.03]
# Данные модели из MC, массив данных
# .model D102  D(Is=3.525p Rs=1.32 Ikf=.1402 N=1 Xti=3 Eg=1.11 Cjo=32.42p
# +  M=.2894 Vj=.75 Fc=.5 Isr=24.36u Nr=2 Bv=199.8 Ibv=344.9n
# +  Tt=2.164u)
Is := Diod_P[0]
Rs := Diod_P[1]
N := Diod_P[2]
Ft := Diod_P[3]
I := MC[:, 1]
# - модельная характеристика с параметрами модели, полученными в процессе расчета по исходным данным MC
U(I) := I*Rs + ln((I + Is)/Is)*N*Ft
# Совместный график, по данным MC и расчетом в MathCad
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# .MODEL KD102A D (IS=21.66P N=1.28 RS=1.79 CJO=3.27P TT=6.12E-9
# +  M=0.32 VJ=0.71 FC=0.5 BV=250 IBV=1E-11 EG=1.11 XTI=3 )
Is = 2.50947e-5
N = 1.77951
Rs = 1.0834
Ft = 0.03
