# Ввод данных о резонансной частоте вручную:
i := 0 .. 5
Fmax[i] := 499672.185799, 501005.667296, 501605.733971, 501989.109901, 502255.806201, 502455.828426
Vvar[i] := -1, -3, -5, -7, -9, -11
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# Ввод данных о резонансной частоте через данные расширенного анализа:
VFH := READPRN("DIODVARICAP02 Peak_X(V(OUT),1,1) vs VVAR.dat")
VFH[:, 0] := -VFH[:, 0]
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# Расчет зависимости емкости от резонансной частоты символическим методом
Frez == 1/(2*π*sqrt((Ck + Cd)*Lk))
# имеются решения
-(Ck*Lk - 1/(4*Frez^2*π^2))/Lk
π = 3.14159
# Данные схемотехнического решения, параметры контура
Lk := 10^-3
Ck := 10^-10
π := 3.14
Ud := VFH[:, 0]
Frez := VFH[:, 1]
Cd(Ud) := -(Ck*Lk - 1/(4*Frez^2*π^2))/Lk
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# Решение методом Given Minerr  для заранее определенной ВФХ
Cbo := 1.3*10^-10
φkon := 0.6
M := 0.5  # - начальные условия для решения
length(Ud) = 7
Given
Cd(Ud[2]) == (Cbo*(φkon/(φkon - Ud[2])))^M
Cd(Ud[0]) == (Cbo*(φkon/(φkon - Ud[0])))^M
Cd(Ud[3]) == (Cbo*(φkon/(φkon - Ud[3])))^M
M < 0.5
M > 0.33
φkon > 0.3
φkon < 0.8
Cbo > 10^-12
Rez := Minerr(Cbo, φkon, M)
Rez = [7.65939e-11; 0.3; 0.5]
# полученное решение для модели
