DATA := READPRN("N22_Hysteresis.txt")
H_a_m := DATA[:, 1] = [
    -0.751; 1.545; 3.841; 5.845; 7.39; 7.64; 9.185; 10.938; 14.278; 15.531
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]
B_mT := DATA[:, 0] = [
    -67.539; -59.038; -50.615; -42.036; -33.457; -24.865; -16.286; -7.707; 0.95; 9.62
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]
B_T := B_mT/1000 = [
    -0.067539; -0.059038; -0.050615; -0.042036; -0.033457; -0.024865; -0.016286; -0.007707; 0.00095; 0.00962
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]
H_Oe := 1000/(4*π)*H_a_m = [
    -59.7627; 122.947; 305.657; 465.13; 588.078; 607.972; 730.919; 870.418; 1136.21; 1235.92
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]
B_G := 10^-4*B_T = [
    -6.7539e-6; -5.9038e-6; -5.0615e-6; -4.2036e-6; -3.3457e-6; -2.4865e-6; -1.6286e-6; -7.707e-7; 9.5e-8; 9.62e-7
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]
DATA_NEW[:, 0] := H_Oe
DATA_NEW[:, 1] := B_G
WRITEPRN("N22_Hysteresis_Oe_G.txt") := DATA_NEW
