# N22
H_am := [-800; -80; -80; 20; 20; 200; 200]
B_mT := [-338; -193.3; -231.3; 136.3; 20.8; 295.34; 301.63]
H_Oe := 4*π/1000*H_am = [-10.0531; -1.00531; -1.00531; 0.251327; 0.251327; 2.51327; 2.51327]
B_G := 10^4*10^-3*B_mT = [-3380; -1933; -2313; 1363; 208; 2953.4; 3016.3]
# N87
H_am := [-600; -60; -60; 60; 60; 200; 200]
B_mT := [-478; -384; -265.9; 265; 285; 430; 440]
H_Oe := 4*π/1000*H_am = [-7.53982; -0.753982; -0.753982; 0.753982; 0.753982; 2.51327; 2.51327]
B_G := 10^4*10^-3*B_mT = [-4780; -3840; -2659; 2650; 2850; 4300; 4400]
# N87 с зазором 1 мм
sig := 1
l := 70.4
m := l/sig = 70.4
u_0 := 1
H_Oe_z1 := B_G/(m*u_0) = [-67.8977; -54.5455; -37.7699; 37.642; 40.483; 61.0795; 62.5]
