# Для FCPF7N60-D:
# Кол-во:
N_fcp := 8  # параметр l в расчёте петли гистерезиса - длина сердечника трансформатора
# Заряд затвора:
Q_g_fcp := 30*10^-9
# Частота переключения:
f_fcp := 100*10^3
# Сопротивление затвора:
R_g_fcp := 25
# Напряжение переключения:
U_gs_fcp := 10
# Средний ток на управление:
I_gs_avg_fcp := Q_g_fcp*f_fcp = 0.003
# Мощность на управление:
P_g_fcp := U_gs_fcp*I_gs_avg_fcp + I_gs_avg_fcp^2*R_g_fcp = 0.030225
# Для stp34nm60n:
# Кол-во:
N_stp := 2
# Заряд затвора:
Q_g_stp := 80.4*10^-9
# Частота переключения:
f_stp := 100*10^3
# Сопротивление затвора:
R_g_stp := 4.7
# Напряжение переключения:
U_gs_stp := 10
# Средний ток на управление:
I_gs_avg_stp := Q_g_stp*f_stp = 0.00804
# Мощность на управление:
P_g_stp := U_gs_stp*I_gs_avg_stp + I_gs_avg_stp^2*R_g_stp = 0.0807038
# Общая мощность на управление:
P_sum := P_g_fcp*N_fcp + P_g_stp*N_stp = 0.403208
