# Скважность в зависимости от выходного напряжения:
# максимальный непрерывный ток через канал при
# нагреве транзистора составяет в среднем 60%
# от тока в нормальных температурных условиях
# (скорее всего для кремния)
U_in := 400
N_in := 400
N_out := 20
# будем брать запас по максимальному току
# в разогретом режиме 50%, тогда общий запас
# в холодном режиме составит 150%
q(U_out) := 2/(U_out/U_in*N_in/N_out)
# при входном напряжении 400 В
# и потребляемой мощности 400 Вт
# амплитудное значение тока
# через транзистор
# составляет 1 А, но при использовании двухтактной схемы
# средний ток составит 0.5 А.
U_out := 0, 0.1 .. 20
# Таки образом с учётом запаса получаем
# минимальный ток 1.25 А при охлаждённом состоянии
R := 1
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R*0.5*0.5 = 0.25
U_in := 400
U_c := U_in/2 = 200
I_n := 5
f := 100*10^3
n := 4/30 = 0.133333
I_n_1 := n*I_n = 0.666667
k_p := 0.01
U_p_c := k_p*U_c = 2
D_max := 0.45
C := I_n_1*D_max/(8*f*U_p_c) = 1.875e-7
