# Выбор сердечника трансформатора.
# Материал: EPCOS N97 или N87
# ETD:
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# ER:
# Входные данные:
t_min := 0
U_in := 400
f := 100*10^3
t_max := 55
U_out := 20
I_out := 5
N_out := 4
# Выходная мощность:
P_out := U_out*I_out*N_out = 400
# КПД трансформатора:
η := 0.99
# Входная мощность:
P_in := P_out/η = 404.04
# Входной ток:
I_in := P_in/U_in = 1.0101
# Возьмём с запасом:
I_in := 1.1
# Сердечник выбирался в программе TDK Electronics
# Выберем сердечник ETD 34 N87
f_min := 25*10^3
# Площадь сечения:
Q := (12.8/2)^2/100 = 0.4096  # cм^2
f_max := 500*10^3
# Допустимая плотность тока:
Δ := 3.9  # А/мм^2
# Допустимая магнитная индукция:
B_max := 0.298  # Тл
# Плотность тока первичной обмотки:
Δ_in := 2
# Сечение провода первичной обмотки:
q_in := I_in/Δ_in = 0.55  # мм^2
# Возьмём:
q_in := 0.7
q_in_Cu := 0.63
# Плотность тока вторичной обмотки:
Δ_out := 3
# Сечение провода вторичной обмотки:
q_out := I_out/Δ_out = 1.66667  # мм^2
# Возьмём:
q_out := 2.27
q_out_Cu := 1.7
# Для повышения технологичности
# возьмём 3 провода первичной обмотки и намотаем параллельно:
q_out_Cu/q_in_Cu = 2.69841
q_out := q_in = 0.7
q_out_Cu := q_in_Cu = 0.63
# Расчёт количества витков обмоток:
# Магнитная индукция:
B := 0.7*B_max = 0.2086
# Коэффициент формы сигнала:
k_f := 1  # для миандра - 1, для синуса - 1.1
# Число витков первичной обмотки:
n_in := U_in*10^4/(4*k_f*f*B*Q) = 117.038
# Напряжение на виток в первичной обмотке:
e_in := U_in/n_in = 3.4177
# Примем падение напряжения на вторичной обмотке:
ΔU := 5  # %
# Коэффициент падения напряжения на вторичной обмотке:
m := 1 + 0.01*ΔU = 1.05
# Число витков вторичной обмотки:
n_out := U_out*m/e_in = 6.14448
# Отношение числа витков трансформатора:
N := n_in/n_out = 19.0476
