# Расчёт трансформатора.
# Входные данные:
U_in := 400
f := 50*10^3
U_out := 20
I_out := 5
N_out := 4
# Выходная мощность:
P_out := U_out*I_out*N_out = 400
# КПД трансформатора:
η := 0.99
# Входная мощность:
P_in := P_out/η = 404.04
# Входной ток:
I_in := P_in/U_in = 1.0101
# Возьмём с запасом:
I_in := 1.1
# По мощности и частоте выбираем магнитопровод и его типоразмер:
# Ш16*20 М2000МН1-14
P_mag := 900
B_mag := 0.15
Q_mag := 3.21  # см^2
Δ < 4
ΔU < 2
L_н := 35
# Провод для намотки:
# ПЭТВ-2
# Сечение провода первичной обмотки:
Δ_in := 3
q_in := I_in/Δ_in = 0.366667  # мм^2
# По таблице:
q_in := 0.396  # мм^2
d_in_Cu := 0.71  # мм
d_in := 0.79  # мм
Δ_in := I_in/q_in = 2.77778
# Сечение провода вторичной обмотки:
Δ_out := 3
q_out := I_out/Δ_out = 1.66667  # мм^2
# По таблице:
q_out := 1.767  # мм^2
d_out_Cu := 1.5  # мм
d_out := 1.6  # мм
Δ_in := I_out/q_out = 2.82965
# Магнитную индукцию берём на 30% меньше допустимого:
B_mag_acc := B_mag - 0.3*B_mag = 0.105
# Коэффициент формы трансформируемого напряжения (для синуса 1.11, для меандра 1):
k_f := 1
# Число витоков первичной обмотки:
n_in := U_in*10^4/(4*k_f*f*B_mag_acc*Q_mag) = 59.3384
# Округлим (для удобства расположения выводов +0.5) :
n_in := 60.5
# Напряжение на один виток первичной обмотки:
e_in := U_in/n_in = 6.61157
# Падение напряжения на вторичной обмотке (%):
ΔU_acc := 1
# Коэффициент падения напряжения на вторичной обмотке:
m := 1 + ΔU_acc*0.01 = 1.01
# Число витков вторичных обмоток:
n_out := U_out*m/e_in = 3.05525
# Коэффициент укладки провода первичной обмотки:
k_у_in := 0.95
# Число витков, размещаемых в одном ряду (первичная обмотка):
b_in := L_н*k_у_in/d_in = 42.0886
# Округляем в меньшую сторону:
b_in := 42
# Коэффициент укладки провода вторичной обмотки:
k_у_out := 0.87
# Число витков, размещаемых в одном ряду (вторичная обмотка):
b_out := L_н*k_у_out/d_out = 19.0312
# Округляем в меньшую сторону:
b_out := 19
# Количество перичных полуобмоток:
ν_in := 1
# Количество параллельных проводов:
k_par_in := 1
# Число слоёв в первичной обмотке:
N_in := n_in*k_par_in/b_in*ν_in = 1.44048
# Округляем в большую сторону:
N_in := 2
# Число слоёв во вторичной обмотке:
N_out := n_out/b_out = 0.160803
# Округляем в большую сторону:
N_out := 1
# Для изоляции использовать Бумагу Кабельную К-120
